*Heading
** Job name: Four-Point-test Model name: Model-1
** Generated by: Abaqus/CAE 2021
*Preprint, echo=NO, model=NO, history=NO, contact=NO
**
** PARTS
**
*Part, name=Concrete-beam
*Node
      1,         100.,        -150.,         100.
      2,         100.,         150.,         100.
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*Element, type=C3D8R
  1,   94,  441,  961,  387,    1,   33,  297,   60
  2,  441,  442,  962,  961,   33,   34,  298,  297
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*Nset, nset=_PickedSet2, internal, generate
    1,  1470,     1
*Elset, elset=_PickedSet2, internal, generate
   1,  984,    1
** Section: Concrete
*Solid Section, elset=_PickedSet2, material=Concrete_CDP
,
*End Part
**
*Part, name=Rebars
*Node
      1,       -1000.,           0.,           0.
      2,        -950.,           0.,           0.
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*Element, type=B31
 1,  1,  2
 2,  2,  3
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*Nset, nset=_PickedSet5, internal, generate
  1,  41,   1
*Elset, elset=_PickedSet5, internal, generate
  1,  40,   1
** Section: Rebar  Profile: Rebar16
*Beam Section, elset=_PickedSet5, material=Q235, temperature=GRADIENTS, section=CIRC
8.
0.,0.,-1.
*End Part
**
*Part, name=Stirrupid
*Node
      1,         -80.,        -130.,           0.
      2,          80.,        -130.,           0.
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*Element, type=B31
1, 2, 5
2, 5, 6
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*Nset, nset=_PickedSet5, internal, generate
  1,  16,   1
*Elset, elset=_PickedSet5, internal, generate
  1,  16,   1
** Section: Stirrup  Profile: Stirrups
*Beam Section, elset=_PickedSet5, material=Q235, temperature=GRADIENTS, section=CIRC
3.
0.,0.,-1.
*End Part
**
*Part, name=Support
*Node
      1,         100.,          50.,         200.
      2,         100.,   33.3333321,         200.
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*Element, type=C3D8R
  1,  45,  46,  50,  49,   1,   2,   6,   5
  2,  46,  47,  51,  50,   2,   3,   7,   6
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*Nset, nset=_PickedSet2, internal, generate
   1,  264,    1
*Elset, elset=_PickedSet2, internal, generate
   1,  150,    1
** Section: support
*Solid Section, elset=_PickedSet2, material=Elastic
,
*End Part
**
**
** ASSEMBLY
**
*Assembly, name=Assembly
**
*Instance, name=Concrete-beam-1, part=Concrete-beam
          0.,         150.,         100.
          0.,         150.,         100.,           0., 151.000000012688,         100., 89.9999992730282
*End Instance
**
*Instance, name=Stirrupid-1, part=Stirrupid
         20.,         150.,         100.
         20.,         150.,         100.,          20., 151.000000012688,         100., 89.9999992730282
*End Instance
**
*Instance, name=Stirrupid-1-lin-2-1, part=Stirrupid
        150.,         150.,         100.
        150.,         150.,         100.,         150., 151.000000012688,         100., 89.9999992730282
*End Instance
**
*Instance, name=Stirrupid-1-lin-3-1, part=Stirrupid
        280.,         150.,         100.
        280.,         150.,         100.,         280., 151.000000012688,         100., 89.9999992730282
*End Instance
**
*Instance, name=Stirrupid-1-lin-4-1, part=Stirrupid
        410.,         150.,         100.
        410.,         150.,         100.,         410., 151.000000012688,         100., 89.9999992730282
*End Instance
**
*Instance, name=Stirrupid-1-lin-5-1, part=Stirrupid
        540.,         150.,         100.
        540.,         150.,         100.,         540., 151.000000012688,         100., 89.9999992730282
*End Instance
**
*Instance, name=Stirrupid-1-lin-6-1, part=Stirrupid
        670.,         150.,         100.
        670.,         150.,         100.,         670., 151.000000012688,         100., 89.9999992730282
*End Instance
**
*Instance, name=Stirrupid-1-lin-7-1, part=Stirrupid
        800.,         150.,         100.
        800.,         150.,         100.,         800., 151.000000012688,         100., 89.9999992730282
*End Instance
**
*Instance, name=Stirrupid-1-lin-8-1, part=Stirrupid
        930.,         150.,         100.
        930.,         150.,         100.,         930., 151.000000012688,         100., 89.9999992730282
*End Instance
**
*Instance, name=Stirrupid-1-lin-9-1, part=Stirrupid
       1060.,         150.,         100.
       1060.,         150.,         100.,        1060., 151.000000012688,         100., 89.9999992730282
*End Instance
**
*Instance, name=Stirrupid-1-lin-10-1, part=Stirrupid
       1190.,         150.,         100.
       1190.,         150.,         100.,        1190., 151.000000012688,         100., 89.9999992730282
*End Instance
**
*Instance, name=Stirrupid-1-lin-11-1, part=Stirrupid
       1320.,         150.,         100.
       1320.,         150.,         100.,        1320., 151.000000012688,         100., 89.9999992730282
*End Instance
**
*Instance, name=Stirrupid-1-lin-12-1, part=Stirrupid
       1450.,         150.,         100.
       1450.,         150.,         100.,        1450., 151.000000012688,         100., 89.9999992730282
*End Instance
**
*Instance, name=Stirrupid-1-lin-13-1, part=Stirrupid
       1580.,         150.,         100.
       1580.,         150.,         100.,        1580., 151.000000012688,         100., 89.9999992730282
*End Instance
**
*Instance, name=Stirrupid-1-lin-14-1, part=Stirrupid
       1710.,         150.,         100.
       1710.,         150.,         100.,        1710., 151.000000012688,         100., 89.9999992730282
*End Instance
**
*Instance, name=Stirrupid-1-lin-15-1, part=Stirrupid
       1840.,         150.,         100.
       1840.,         150.,         100.,        1840., 151.000000012688,         100., 89.9999992730282
*End Instance
**
*Instance, name=Stirrupid-1-lin-16-1, part=Stirrupid
       1970.,         150.,         100.
       1970.,         150.,         100.,        1970., 151.000000012688,         100., 89.9999992730282
*End Instance
**
*Instance, name=Rebars-1, part=Rebars
       1000.,          20., 20.0000000000001
       1000.,          20., 20.0000000000001,        1000.,          21., 20.0000000000001,         180.
*End Instance
**
*Instance, name=Rebars-1-lin-1-2, part=Rebars
       1000.,         280., 20.0000000000001
       1000.,         280., 20.0000000000001,        1000.,         281., 20.0000000000001,         180.
*End Instance
**
*Instance, name=Rebars-1-lin-2-1, part=Rebars
       1000.,          20.,         180.
       1000.,          20.,         180.,        1000.,          21.,         180.,         180.
*End Instance
**
*Instance, name=Rebars-1-lin-2-2, part=Rebars
       1000.,         280.,         180.
       1000.,         280.,         180.,        1000.,         281.,         180.,         180.
*End Instance
**
*Instance, name=Support-1, part=Support
       1900.,         -50.,           0.
*End Instance
**
*Instance, name=Support-1-lin-2-1, part=Support
       1325.,         300.,           0.
*End Instance
**
*Instance, name=Support-1-lin-3-1, part=Support
        575.,         300.,           0.
*End Instance
**
*Instance, name=Support-1-lin-4-1, part=Support
          0.,         -50.,           0.
*End Instance
**
*Node
      1,         625.,         350.,         100.
*Node
      2,        1375.,         350.,         100.
*Nset, nset=D/S
 1,
*Nset, nset=d/s2
 2,
*Nset, nset=_PickedSet60, internal, instance=Stirrupid-1, generate
  1,  16,   1
*Nset, nset=_PickedSet60, internal, instance=Stirrupid-1-lin-2-1, generate
  1,  16,   1
*Nset, nset=_PickedSet60, internal, instance=Stirrupid-1-lin-3-1, generate
  1,  16,   1
*Nset, nset=_PickedSet60, internal, instance=Stirrupid-1-lin-7-1, generate
  1,  16,   1
*Nset, nset=_PickedSet60, internal, instance=Stirrupid-1-lin-15-1, generate
  1,  16,   1
*Nset, nset=_PickedSet60, internal, instance=Stirrupid-1-lin-11-1, generate
  1,  16,   1
*Nset, nset=_PickedSet60, internal, instance=Rebars-1-lin-2-1, generate
  1,  41,   1
*Nset, nset=_PickedSet60, internal, instance=Stirrupid-1-lin-5-1, generate
  1,  16,   1
*Nset, nset=_PickedSet60, internal, instance=Stirrupid-1-lin-9-1, generate
  1,  16,   1
*Nset, nset=_PickedSet60, internal, instance=Rebars-1, generate
  1,  41,   1
*Nset, nset=_PickedSet60, internal, instance=Stirrupid-1-lin-13-1, generate
  1,  16,   1
*Nset, nset=_PickedSet60, internal, instance=Stirrupid-1-lin-4-1, generate
  1,  16,   1
*Nset, nset=_PickedSet60, internal, instance=Stirrupid-1-lin-8-1, generate
  1,  16,   1
*Nset, nset=_PickedSet60, internal, instance=Stirrupid-1-lin-16-1, generate
  1,  16,   1
*Nset, nset=_PickedSet60, internal, instance=Stirrupid-1-lin-12-1, generate
  1,  16,   1
*Nset, nset=_PickedSet60, internal, instance=Rebars-1-lin-2-2, generate
  1,  41,   1
*Nset, nset=_PickedSet60, internal, instance=Stirrupid-1-lin-6-1, generate
  1,  16,   1
*Nset, nset=_PickedSet60, internal, instance=Stirrupid-1-lin-10-1, generate
  1,  16,   1
*Nset, nset=_PickedSet60, internal, instance=Rebars-1-lin-1-2, generate
  1,  41,   1
*Nset, nset=_PickedSet60, internal, instance=Stirrupid-1-lin-14-1, generate
  1,  16,   1
*Elset, elset=_PickedSet60, internal, instance=Stirrupid-1, generate
  1,  16,   1
*Elset, elset=_PickedSet60, internal, instance=Stirrupid-1-lin-2-1, generate
  1,  16,   1
*Elset, elset=_PickedSet60, internal, instance=Stirrupid-1-lin-3-1, generate
  1,  16,   1
*Elset, elset=_PickedSet60, internal, instance=Stirrupid-1-lin-7-1, generate
  1,  16,   1
*Elset, elset=_PickedSet60, internal, instance=Stirrupid-1-lin-15-1, generate
  1,  16,   1
*Elset, elset=_PickedSet60, internal, instance=Stirrupid-1-lin-11-1, generate
  1,  16,   1
*Elset, elset=_PickedSet60, internal, instance=Rebars-1-lin-2-1, generate
  1,  40,   1
*Elset, elset=_PickedSet60, internal, instance=Stirrupid-1-lin-5-1, generate
  1,  16,   1
*Elset, elset=_PickedSet60, internal, instance=Stirrupid-1-lin-9-1, generate
  1,  16,   1
*Elset, elset=_PickedSet60, internal, instance=Rebars-1, generate
  1,  40,   1
*Elset, elset=_PickedSet60, internal, instance=Stirrupid-1-lin-13-1, generate
  1,  16,   1
*Elset, elset=_PickedSet60, internal, instance=Stirrupid-1-lin-4-1, generate
  1,  16,   1
*Elset, elset=_PickedSet60, internal, instance=Stirrupid-1-lin-8-1, generate
  1,  16,   1
*Elset, elset=_PickedSet60, internal, instance=Stirrupid-1-lin-16-1, generate
  1,  16,   1
*Elset, elset=_PickedSet60, internal, instance=Stirrupid-1-lin-12-1, generate
  1,  16,   1
*Elset, elset=_PickedSet60, internal, instance=Rebars-1-lin-2-2, generate
  1,  40,   1
*Elset, elset=_PickedSet60, internal, instance=Stirrupid-1-lin-6-1, generate
  1,  16,   1
*Elset, elset=_PickedSet60, internal, instance=Stirrupid-1-lin-10-1, generate
  1,  16,   1
*Elset, elset=_PickedSet60, internal, instance=Rebars-1-lin-1-2, generate
  1,  40,   1
*Elset, elset=_PickedSet60, internal, instance=Stirrupid-1-lin-14-1, generate
  1,  16,   1
*Nset, nset=_PickedSet61, internal, instance=Concrete-beam-1, generate
    1,  1470,     1
*Elset, elset=_PickedSet61, internal, instance=Concrete-beam-1, generate
   1,  984,    1
*Nset, nset=_PickedSet70, internal, instance=Support-1-lin-3-1, generate
   1,  261,    4
*Elset, elset=_PickedSet70, internal, instance=Support-1-lin-3-1, generate
   1,  148,    3
*Nset, nset=_PickedSet71, internal
 1,
*Nset, nset=_PickedSet72, internal, instance=Support-1-lin-2-1, generate
   1,  261,    4
*Elset, elset=_PickedSet72, internal, instance=Support-1-lin-2-1, generate
   1,  148,    3
*Nset, nset=_PickedSet73, internal
 2,
*Nset, nset=_PickedSet74, internal, instance=Support-1, generate
   4,  264,    4
*Nset, nset=_PickedSet74, internal, instance=Support-1-lin-4-1, generate
   4,  264,    4
*Elset, elset=_PickedSet74, internal, instance=Support-1, generate
   3,  150,    3
*Elset, elset=_PickedSet74, internal, instance=Support-1-lin-4-1, generate
   3,  150,    3
*Elset, elset=_CP-1-Concrete-beam-1_S6, internal, instance=Concrete-beam-1
   1,   7,  13,  19,  25,  31
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*Elset, elset=_CP-1-Concrete-beam-1_S4, internal, instance=Concrete-beam-1
 246, 252, 258, 264, 270, 276
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*Surface, type=ELEMENT, name=CP-1-Concrete-beam-1
_CP-1-Concrete-beam-1_S6, S6
_CP-1-Concrete-beam-1_S4, S4
*Elset, elset=_CP-1-Support-1_S6, internal, instance=Support-1, generate
   1,  148,    3
*Surface, type=ELEMENT, name=CP-1-Support-1
_CP-1-Support-1_S6, S6
*Elset, elset=_CP-2-Concrete-beam-1_S6, internal, instance=Concrete-beam-1
 241, 247, 253, 259, 265, 271
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*Elset, elset=_CP-2-Concrete-beam-1_S4, internal, instance=Concrete-beam-1
   6,  12,  18,  24,  30,  36
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*Surface, type=ELEMENT, name=CP-2-Concrete-beam-1
_CP-2-Concrete-beam-1_S6, S6
_CP-2-Concrete-beam-1_S4, S4
*Elset, elset=_CP-2-Support-1-lin-2-1_S4, internal, instance=Support-1-lin-2-1, generate
   3,  150,    3
*Surface, type=ELEMENT, name=CP-2-Support-1-lin-2-1
_CP-2-Support-1-lin-2-1_S4, S4
*Elset, elset=_CP-3-Concrete-beam-1_S6, internal, instance=Concrete-beam-1
 241, 247, 253, 259, 265, 271
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*Elset, elset=_CP-3-Concrete-beam-1_S4, internal, instance=Concrete-beam-1
   6,  12,  18,  24,  30,  36
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*Surface, type=ELEMENT, name=CP-3-Concrete-beam-1
_CP-3-Concrete-beam-1_S6, S6
_CP-3-Concrete-beam-1_S4, S4
*Elset, elset=_CP-3-Support-1-lin-3-1_S4, internal, instance=Support-1-lin-3-1, generate
   3,  150,    3
*Surface, type=ELEMENT, name=CP-3-Support-1-lin-3-1
_CP-3-Support-1-lin-3-1_S4, S4
*Elset, elset=_CP-4-Concrete-beam-1_S6, internal, instance=Concrete-beam-1
   1,   7,  13,  19,  25,  31
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*Elset, elset=_CP-4-Concrete-beam-1_S4, internal, instance=Concrete-beam-1
 246, 252, 258, 264, 270, 276
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*Surface, type=ELEMENT, name=CP-4-Concrete-beam-1
_CP-4-Concrete-beam-1_S6, S6
_CP-4-Concrete-beam-1_S4, S4
*Elset, elset=_CP-4-Support-1-lin-4-1_S6, internal, instance=Support-1-lin-4-1, generate
   1,  148,    3
*Surface, type=ELEMENT, name=CP-4-Support-1-lin-4-1
_CP-4-Support-1-lin-4-1_S6, S6
*Surface, type=NODE, name=_PickedSet70_CNS_, internal
_PickedSet70, 1.
*Surface, type=NODE, name=_PickedSet72_CNS_, internal
_PickedSet72, 1.
** Constraint: CP-1-Concrete-beam-1-Support-1
*Tie, name=CP-1-Concrete-beam-1-Support-1, adjust=yes, type=SURFACE TO SURFACE
CP-1-Support-1, CP-1-Concrete-beam-1
** Constraint: CP-2-Concrete-beam-1-Support-1-lin-2-1
*Tie, name=CP-2-Concrete-beam-1-Support-1-lin-2-1, adjust=yes, type=SURFACE TO SURFACE
CP-2-Support-1-lin-2-1, CP-2-Concrete-beam-1
** Constraint: CP-3-Concrete-beam-1-Support-1-lin-3-1
*Tie, name=CP-3-Concrete-beam-1-Support-1-lin-3-1, adjust=yes, type=SURFACE TO SURFACE
CP-3-Support-1-lin-3-1, CP-3-Concrete-beam-1
** Constraint: CP-4-Concrete-beam-1-Support-1-lin-4-1
*Tie, name=CP-4-Concrete-beam-1-Support-1-lin-4-1, adjust=yes, type=SURFACE TO SURFACE
CP-4-Support-1-lin-4-1, CP-4-Concrete-beam-1
** Constraint: Constraint-6
*Coupling, constraint name=Constraint-6, ref node=_PickedSet71, surface=_PickedSet70_CNS_
*Kinematic
** Constraint: Constraint-7
*Coupling, constraint name=Constraint-7, ref node=_PickedSet73, surface=_PickedSet72_CNS_
*Kinematic
** Constraint: EM
*Embedded Element, host elset=_PickedSet61
_PickedSet60
*End Assembly
*Amplitude, name=Amp-1
             0.,              0.,              1.,             0.2,              2.,             0.4,              3.,             0.6
             4.,             0.8,              5.,              1.
**
** MATERIALS
**
*Material, name=Concrete_CDP
*Density
 2.4e-09,
*Elastic
23900., 0.2
*Concrete Damaged Plasticity
30.,    0.1,   1.16,  0.667, 0.0005
*Concrete Compression Hardening
 14.4337,          0.
   16.52, 0.000184283
 18.0259,  0.00028101
 19.0446, 0.000393957
 19.6725,  0.00051991
 19.9973, 0.000655941
 20.0935, 0.000799574
 19.6104,  0.00110929
 18.5218,   0.0014391
 17.2138,  0.00177614
 15.8904,  0.00211361
 14.6451,  0.00244839
 13.5124,  0.00277933
 12.4988,  0.00310621
 11.5979,  0.00342925
 10.7987,  0.00374881
 10.0891,  0.00406531
*Concrete Tension Stiffening
  2.25705,          0.
  2.07865,    5.18e-05
  1.82164,    8.05e-05
   1.5932, 0.000108287
  1.40714, 0.000134661
  1.25785,  0.00015981
  1.13732, 0.000183999
  1.03875, 0.000207456
 0.956987, 0.000230352
 0.888226, 0.000252814
 0.829663, 0.000274936
*Concrete Compression Damage
       0.,          0.
 0.134404, 0.000184283
 0.174561,  0.00028101
 0.214466, 0.000393957
 0.253159,  0.00051991
 0.290055, 0.000655941
 0.324845, 0.000799574
  0.39108,  0.00110929
 0.452081,   0.0014391
 0.505861,  0.00177614
 0.552354,  0.00211361
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 0.981687,    0.064051
*Concrete Tension Damage
       0.,          0.
 0.243426,    5.18e-05
 0.344276,    8.05e-05
  0.42637, 0.000108287
 0.491735, 0.000134661
 0.544109,  0.00015981
 0.586674, 0.000183999
 0.621806, 0.000207456
 0.651234, 0.000230352
 0.676219, 0.000252814
 0.697684, 0.000274936
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 0.983087,  0.00783554
*Material, name=Elastic
*Density
 7.85e-09,
*Elastic
200000., 0.3
*Material, name=Q235
*Density
 7.85e-09,
*Elastic
199000., 0.3
*Plastic
   235.,       0.
   260., 0.001262
 339.39,  0.03857
   410.,     0.11
 390.14,     0.17
**
** BOUNDARY CONDITIONS
**
** Name: BC-1 Type: 对称/反对称/完全固定
*Boundary
_PickedSet74, ENCASTRE
** ----------------------------------------------------------------
**
** STEP: Dynamic
**
*Step, name=Dynamic, nlgeom=YES
*Dynamic, Explicit
, 5.
*Bulk Viscosity
0.06, 1.2
**
** BOUNDARY CONDITIONS
**
** Name: Dis Type: 位移/转角
*Boundary, amplitude=Amp-1
D/S, 1, 1
D/S, 2, 2, -100.
D/S, 3, 3
D/S, 4, 4
D/S, 5, 5
D/S, 6, 6
** Name: Dis2 Type: 位移/转角
*Boundary, amplitude=Amp-1
d/s2, 1, 1
d/s2, 2, 2, -100.
d/s2, 3, 3
d/s2, 4, 4
d/s2, 5, 5
d/s2, 6, 6
**
** OUTPUT REQUESTS
**
*Restart, write, number interval=1, time marks=NO
**
** FIELD OUTPUT: F-Output-1
**
*Output, field
*Node Output
A, RF, U, V
*Element Output, directions=YES
DAMAGEC, DAMAGET, EVF, LE, PE, PEEQ, PEEQVAVG, PEVAVG, S, SVAVG
*Contact Output
CSTRESS,
**
** HISTORY OUTPUT: H-Output-1
**
*Output, history, time interval=0.01
*Node Output, nset=D/S
RF2, U2
**
** HISTORY OUTPUT: H-Output-2
**
*Node Output, nset=d/s2
RF2, U2
*End Step
